Thu Nov  7 20:08:56 UTC 2013
;; 1. Based on:
;; 2. Description: 1-comp oral, linear elim
;; 3. Label:
;; x1. Author: devin
$PROBLEM    PK
$INPUT      ID TIME DV AMT DOSE MDV ISM
$DATA       data1.csv IGNORE=@
$SUBROUTINE ADVAN2 TRANS2
$PK

TVCL = THETA(1)*(1 + THETA(2)*(1-ISM))
CL = TVCL * EXP(ETA(1))
V  = THETA(3) * EXP(ETA(2))
KA = THETA(4) * EXP(ETA(3))
S2 = V

$ERROR

IPRED = F
 Y = F*(1 + EPS(1))

$THETA  0.45 ; CL
 -0.7 ; femaleCL proportion
 1.3 ; V
 0.7 ; KA
$OMEGA  0.1  ;     IIV CL
 0.1  ;      IIV V
 0.1  ;     IIV KA
$SIGMA  0.04  ; 10% prop variability
$ESTIMATION METHOD=1 INTER MAXEVAl=9999 NOABORT PRINT=1 NSIG=3 SIGL=8
            POSTHOC MSFO=msfb001
; Xpose
$COVARIANCE
$TABLE      ID TIME DV AMT DOSE MDV ISM IPRED ONEHEADER NOPRINT
            FILE=sdtab001
$TABLE      ID TIME DV AMT TVCL CL V KA NOPRINT ONEHEADER
            FILE=patab001
$TABLE      ID TIME ONEHEADER NOPRINT FILE=cotab001
$TABLE      ID ISM DOSE ONEHEADER NOPRINT FILE=catab001

NM-TRAN MESSAGES
 WARNINGS AND ERRORS (IF ANY) FOR PROBLEM    1
 (WARNING  2) NM-TRAN INFERS THAT THE DATA ARE POPULATION.

1NONLINEAR MIXED EFFECTS MODEL PROGRAM (NONMEM) VERSION 7.2.0
 ORIGINALLY DEVELOPED BY STUART BEAL, LEWIS SHEINER, AND ALISON BOECKMANN
 CURRENT DEVELOPERS ARE ROBERT BAUER, ICON DEVELOPMENT SOLUTIONS,
 AND ALISON BOECKMANN. IMPLEMENTATION, EFFICIENCY, AND STANDARDIZATION
 PERFORMED BY NOUS INFOSYSTEMS.
 PROBLEM NO.:         1
 PK
 TOT. NO. OF OBS RECS:      550
 TOT. NO. OF INDIVIDUALS:     50
 ONE COMPARTMENT MODEL WITH FIRST-ORDER ABSORPTION (ADVAN2)
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 #TBLN:      1
 #METH: First Order Conditional Estimation with Interaction
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
 #TERM:
0MINIMIZATION SUCCESSFUL
 NO. OF FUNCTION EVALUATIONS USED:      268
 NO. OF SIG. DIGITS IN FINAL EST.:  3.3

 ETABAR IS THE ARITHMETIC MEAN OF THE ETA-ESTIMATES,
 AND THE P-VALUE IS GIVEN FOR THE NULL HYPOTHESIS THAT THE TRUE MEAN IS 0.

 ETABAR:         4.3213E-03  3.6409E-03  6.9017E-03
 SE:             3.6628E-02  4.3143E-02  3.1527E-02

 P VAL.:         9.0608E-01  9.3274E-01  8.2672E-01

 ETAshrink(%):   2.7876E+00  2.0053E+00  1.1637E+01
 EPSshrink(%):   1.2541E+01


 #TERE:
 Elapsed estimation time in seconds:     3.16
 Elapsed covariance time in seconds:     2.38

 ********************               FIRST ORDER CONDITIONAL ESTIMATION WITH INTERACTION              ********************
 #OBJT:**************                       MINIMUM VALUE OF OBJECTIVE FUNCTION                      ********************
 #OBJV:********************************************     2678.167       **************************************************

 ********************               FIRST ORDER CONDITIONAL ESTIMATION WITH INTERACTION              ********************
 ********************                             FINAL PARAMETER ESTIMATE                           ********************

 THETA - VECTOR OF FIXED EFFECTS PARAMETERS   *********
         TH 1      TH 2      TH 3      TH 4
         4.96E-01 -8.04E-01  1.00E+00  9.61E-01

 OMEGA - COV MATRIX FOR RANDOM EFFECTS - ETAS  ********
            ETA1      ETA2      ETA3
 ETA1
+        7.24E-02
 ETA2
+        0.00E+00  9.89E-02
 ETA3
+        0.00E+00  0.00E+00  6.49E-02

 SIGMA - COV MATRIX FOR RANDOM EFFECTS - EPSILONS  ****
            EPS1
 EPS1
+        9.59E-03

 OMEGA - CORR MATRIX FOR RANDOM EFFECTS - ETAS  *******
            ETA1      ETA2      ETA3
 ETA1
+        2.69E-01
 ETA2
+        0.00E+00  3.14E-01
 ETA3
+        0.00E+00  0.00E+00  2.55E-01

 SIGMA - CORR MATRIX FOR RANDOM EFFECTS - EPSILONS  ***
            EPS1
 EPS1
+        9.79E-02

 ********************               FIRST ORDER CONDITIONAL ESTIMATION WITH INTERACTION              ********************
 ********************                            STANDARD ERROR OF ESTIMATE                          ********************

 THETA - VECTOR OF FIXED EFFECTS PARAMETERS   *********
         TH 1      TH 2      TH 3      TH 4
         2.78E-02  1.51E-02  4.66E-02  3.97E-02

 OMEGA - COV MATRIX FOR RANDOM EFFECTS - ETAS  ********
            ETA1      ETA2      ETA3
 ETA1
+        1.22E-02
 ETA2
+       .........  2.58E-02
 ETA3
+       ......... .........  1.65E-02

 SIGMA - COV MATRIX FOR RANDOM EFFECTS - EPSILONS  ****
            EPS1
 EPS1
+        7.13E-04

 OMEGA - CORR MATRIX FOR RANDOM EFFECTS - ETAS  *******
            ETA1      ETA2      ETA3
 ETA1
+        2.27E-02
 ETA2
+       .........  4.10E-02
 ETA3
+       ......... .........  3.23E-02

 SIGMA - CORR MATRIX FOR RANDOM EFFECTS - EPSILONS  ***
            EPS1
 EPS1
+        3.64E-03

 ********************               FIRST ORDER CONDITIONAL ESTIMATION WITH INTERACTION              ********************
 ********************                          COVARIANCE MATRIX OF ESTIMATE                         ********************

            TH 1      TH 2      TH 3      TH 4      OM11      OM12      OM13      OM22      OM23      OM33      SG11
 TH 1
+        7.73E-04
 TH 2
+       -2.99E-04  2.27E-04
 TH 3
+        5.28E-05 -2.96E-06  2.17E-03
 TH 4
+       -1.76E-04  1.79E-04  2.15E-04  1.58E-03
 OM11
+        2.47E-05 -1.57E-05 -1.24E-05 -8.88E-05  1.50E-04
 OM12
+       ......... ......... ......... ......... ......... .........
 OM13
+       ......... ......... ......... ......... ......... ......... .........
 OM22
+       -9.67E-05 -3.26E-05 -5.80E-04  4.09E-05  3.07E-06 ......... .........  6.64E-04
 OM23
+       ......... ......... ......... ......... ......... ......... ......... ......... .........
 OM33
+        5.32E-05 -4.71E-05 -3.31E-05 -1.12E-04 -5.89E-06 ......... ......... -3.26E-05 .........  2.71E-04
 SG11
+       -5.39E-07  8.15E-07 -4.96E-06  8.33E-07 -6.42E-07 ......... ......... -3.79E-06 .........  4.02E-06  5.09E-07

 ********************               FIRST ORDER CONDITIONAL ESTIMATION WITH INTERACTION              ********************
 ********************                          CORRELATION MATRIX OF ESTIMATE                        ********************

            TH 1      TH 2      TH 3      TH 4      OM11      OM12      OM13      OM22      OM23      OM33      SG11
 TH 1
+        2.78E-02
 TH 2
+       -7.15E-01  1.51E-02
 TH 3
+        4.07E-02 -4.23E-03  4.66E-02
 TH 4
+       -1.60E-01  3.00E-01  1.16E-01  3.97E-02
 OM11
+        7.27E-02 -8.53E-02 -2.18E-02 -1.83E-01  1.22E-02
 OM12
+       ......... ......... ......... ......... ......... .........
 OM13
+       ......... ......... ......... ......... ......... ......... .........
 OM22
+       -1.35E-01 -8.42E-02 -4.83E-01  4.01E-02  9.74E-03 ......... .........  2.58E-02
 OM23
+       ......... ......... ......... ......... ......... ......... ......... ......... .........
 OM33
+        1.16E-01 -1.90E-01 -4.31E-02 -1.72E-01 -2.93E-02 ......... ......... -7.69E-02 .........  1.65E-02
 SG11
+       -2.72E-02  7.59E-02 -1.49E-01  2.94E-02 -7.36E-02 ......... ......... -2.06E-01 .........  3.42E-01  7.13E-04
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