Thu Feb 20 21:10:08 UTC 2014
;; 1. Based on: 001
;; 2. Description: 1-comp oral, linear elim
;; 3. Label:
;; x1. Author: devin
$PROBLEM    PK
$INPUT      ID TIME DV AMT DOSE MDV ISM
$DATA       data1.csv IGNORE=@
$SUBROUTINE ADVAN2 TRANS2
$PK
TVCL = THETA(1)*(1 + THETA(2)*(1-ISM))
CL = TVCL * EXP(ETA(1))
V  = THETA(3) * EXP(ETA(2))
KA = THETA(4) * EXP(ETA(3))
S2 = V

$ERROR
REP = IREP
IPRED = F
 Y = F*(1 + EPS(1))

$THETA  0.495704 ; CL
 -0.804158 ; femaleCL proportion
 1.00481 ; V
 0.961397 ; KA
$OMEGA  0.072431  ;     IIV CL
 0.0988913  ;      IIV V
 0.0649482  ;     IIV KA
$SIGMA  0.00958705  ; 10% prop variability
$SIMULATION ONLYSIM (12345) SUBPROBLEMS=100
$TABLE      ID REP TIME DV IPRED PRED AMT DOSE ISM MDV NOHEADER
            NOAPPEND NOPRINT FILE=run001QPC

NM-TRAN MESSAGES
 WARNINGS AND ERRORS (IF ANY) FOR PROBLEM    1
 (WARNING  2) NM-TRAN INFERS THAT THE DATA ARE POPULATION.

1NONLINEAR MIXED EFFECTS MODEL PROGRAM (NONMEM) VERSION 7.2.0
 ORIGINALLY DEVELOPED BY STUART BEAL, LEWIS SHEINER, AND ALISON BOECKMANN
 CURRENT DEVELOPERS ARE ROBERT BAUER, ICON DEVELOPMENT SOLUTIONS,
 AND ALISON BOECKMANN. IMPLEMENTATION, EFFICIENCY, AND STANDARDIZATION
 PERFORMED BY NOUS INFOSYSTEMS.
 PROBLEM NO.:         1
 PK
 TOT. NO. OF OBS RECS:      550
 TOT. NO. OF INDIVIDUALS:     50
 ONE COMPARTMENT MODEL WITH FIRST-ORDER ABSORPTION (ADVAN2)
 PROBLEM NO.:         1     SUBPROBLEM NO.:      1
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 SIMULATION STEP PERFORMED
 PROBLEM NO.:         1     SUBPROBLEM NO.:      2
 SIMULATION STEP PERFORMED
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